r := 0.75
p1 := 0.7
p2 := 0.65
P000 := 0
P001 := 0
P100 := 0
P101 := 0
P111 := 0
P011 := 0
P021 := 0
P121 := 0
Given
P000 == r*P000 + r*(1 - p2)*P001
P100 == (1 - r)*P000 + p1*P100 + (1 - r)*(1 - p2)*P001 + p1*(1 - p2)*P101
P001 == r*(1 - p1)*P100 + r*p2*P001 + r*(1 - p1)*(1 - p2)*P101 + r*(1 - p2)*P011
P101 == (1 - r)*(1 - p1)*P100 + (1 - r)*p2*P001 + (p1*p2 + (1 - r)*(1 - p1)*(1 - p2))*P101 + p1*(1 - p2)*P111 + (1 - r)*(1 - p2)*P011
P111 == (1 - r)*(1 - p1)*p2*P101 + ((1 - r)*(1 - p1)*(1 - p2) + p1*p2)*P111 + (1 - r)*p2*P011 + (1 - r)*(1 - p2)*P021 + p1*(1 - p2)*P121
P011 == r*(1 - p1)*p2*P101 + r*(1 - p1)*(1 - p2)*P111 + r*p2*P011 + r*(1 - p2)*P021
P021 == r*(1 - p1)*p2*P111 + r*p2*P021 + r*(1 - p1)*P121
P000 + P100 + P001 + P101 + P111 + P011 + P021 + P121 == 1
Find(P000, P100, P001, P101, P111, P011, P021, P121) → [0.208964794191; 0.344629485028; 0.199014089706; 0.137689445352; 0.0355212972039; 0.0518477829391; 0.0138575436905; 0.0084755618902]
Pбл := 0
Q := 1 - 0.344629485028 = 0.655371
Lоч := (0.0940854541604 + 0.0242722844242)*1 = 0.118358
Wоч := Lоч/(Q*0.5) = 0.361193
K1 := 1 - 0.204877429786 = 0.795123
Wс := Wоч + K1/3 = 0.626234
